x := 2  # первое задание
n := 6
y := (sqrt(x^3 + n) + cos(|n*x - 1|)^2)/((x^5 + sin(x) + n)^(1/4)*cos((n + x)*π/4))
y = 1.49814  # второе задание
x := 7
y := 10
z := -3
p := if(x > y, sin(x) + 3*y - z^2, (y + 3)/sqrt(z^2 + 1)*ln(x + 1))
q := if((x > y) and (x < 1), cos(x) + 2*(y + 1) - z, (x*y + 3)/sqrt(y^2 + 5))
w := if((x < y) or (y ≥ 10), x^2 + 2*(y*x + 1) - z, (x^-3*y^2 + 3)*sqrt(z^2 + 7))
p = 8.5485
q = 7.12407
w = 194  # третье задание
f(x) := (x^2 - n*x + sin(x))*sqrt(|x - cos(n*x)|)
x := -2, -1.6 .. 2
f(x) = [25.4486; 8.75444; 10.3653; 4.44907; 1.2608; 0; -1.97362; -2.90593; -3.7136; -9.71117; -7.62422]
x = [-2; -1.6; -1.2; -0.8; -0.4; 0; 0.4; 0.8; 1.2; 1.6; 2]
# четвертое задание
a := -3*n
b := 3*n
A := runif(3, a, b)
B := runif(3, a, b)
C := runif(3, a, b)
transpose(A) = [-17.9543, -11.0404, 3.06022]
transpose(B) = [-5.38891, 11.6222, -11.7314]
transpose(C) = [7.57783, -7.0565, -14.7092]
sAB2 := A*B  # шаблон
sAB2 = -67.4592
sAB := A[0]*B[0] + A[1]*B[1] + A[2]*B[2]  # без
sAB = -67.4592
VBC := [B[1]*C[2] - B[2]*C[1]; B[2]*C[0] - B[0]*C[2]; B[0]*C[1] - B[1]*C[0]]
VBC2 := B×C
VBC = [-253.735; -168.165; -50.044]
VBC2 = [-253.735; -168.165; -50.044]
AB := [A[1]*B[2] - A[2]*B[1]; A[2]*B[0] - A[0]*B[2]; A[0]*B[1] - A[1]*B[0]]
mix := AB[0]*C[0] + AB[1]*C[1] + AB[2]*C[2]
mix2 := (A×B)*C
mix = 6259.1
mix2 = 6259.1
res := if((|A| ≥ |B|) and (|A| ≥ |C|), "Это A", if(|B| ≥ |C|, "Это B", "Это C"))
res = "Это A"
N := 10
M[N - 1, N - 1] := 0
i := 0 .. N - 1
j := 0 .. N - 1
M[i, j] := floor(rnd(21)) - 10
M = [
    -7, 10, -8, -10, 1, 2, -7, -1, -9, 6;
    0, 8, 10, 1, -1, 8, 6, 10, 2, -5;
    7, -3, 4, -10, -5, 2, 7, 0, 5, -1;
    5, 2, 5, 2, -7, -2, 0, 5, -7, 0;
    4, -7, -8, 4, -2, 10, -7, 7, -6, 7;
    -7, 5, -5, 4, 5, -8, 7, 0, -2, 9;
    1, -1, 7, -1, 10, 5, -6, 7, 0, -10;
    2, 1, 7, 3, 7, -8, -4, -4, -8, 7;
    2, -5, -10, 6, -6, 1, -8, 5, 1, -1;
    4, -1, 2, 3, 0, 4, -7, -7, -1, -8
]
Sm := sum(sum(M[i, j], j = 0 .. N - 1), i = 0 .. N - 1)
Sp := sum(sum(if(M[i, j] > 0, M[i, j], 0), j = 0 .. N - 1), i = 0 .. N - 1)
Sn := sum(sum(if(M[i, j] < 0, M[i, j], 0), j = 0 .. N - 1), i = 0 .. N - 1)
Sm = 24
Sp = 255
Sn = -231
col1 := M[:, 0]
rowN := transpose(M)[:, N - 1]
dp := col1*rowN
dp = -82
# Задание 5
y(t) := exp(-|t|/3)*cos(t)
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# Задание 6
f(x) := if(x < 0, exp(x)*x^3, exp(-x)*x^3)
x := -9, -8.75 .. 9
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# Задание 7
g(x) := sqrt(|x|)*sin(x)
i := 0 .. 16
X[i] := -2*π + i*π/4
Y[i] := g(X[i])
WRITEPRN("X.txt") := X
WRITEPRN("Y.txt") := Y
XX := READPRN("X.txt")
YY := READPRN("Y.txt")
XX = [-6.283; -5.498; -4.712; -3.927; -3.142; -2.356; -1.571; -0.7854; 0; 0.7854; 1.571; 2.356; 3.142; 3.927; 4.712; 5.498; 6.283]
YY = [0; 1.658; 2.171; 1.401; 0; -1.085; -1.253; -0.6267; 0; 0.6267; 1.253; 1.085; 0; -1.401; -2.171; -1.658; 0]
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# Задание 8
q(x) := exp(-x^2)
qp(x) := d/dx(q(x))
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# Задание 9
f(x, y) := sin(sqrt(x^2 + y^2))/sqrt(x^2 + y^2)
# [component: inputs f]
# Задание 10
f(x) := x^2 + (x - 2)*sin(x) - 5
x := -5, -4.9 .. 5
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x := -1.5
r1 := root(f(x), x)
r1 = -1.32936
x := 2
r2 := root(f(x), x)
r2 = 2.19967
f(r1) = -7.24754e-13
f(r2) = 3.52607e-13
# Задание 11
f(x) := x^2 + x*sin(2*x) - (x - 5)*cos(x)
x := -4, -3.95 .. 4
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r1 := root(f(x), x, -3, -2.9)
r2 := root(f(x), x, -2, -1.9)
r1 = -2.97354
r2 = -1.93283
f(r1) = -1.77636e-15
f(r2) = 0
# Задание 12
v := [-3*n; 3 - 4*n; 4 - n; 1]
polyroots(v) = [-3; -1; 6]
P(x) := x^3 + (4 - n)*x^2 + (3 - 4*n)*x - 3*n
s := polyroots(v)
P(s[1]) = -1.06581e-14
P(s[2]) = 0
P(s[0]) = -1.42109e-14
# Задание 13
A := [n, n + 1, n + 2; n - 3, n - 2, n; n - 1, n, n + 1]
b := [6*n + 8; 6*n - 7; 6*n + 2]
s := lsolve(A, b)
s = [1; 2; 3]
x := 1
y := 1
z := 1
Given
n*x + (n + 1)*y + (n + 2)*z == 6*n + 8
(n - 3)*x + (n - 2)*y + n*z == 6*n - 7
(n - 1)*x + n*y + (n + 1)*z == 6*n + 2
sol := Find(x, y, z)
sol = [1; 2; 3]
A*s = [44; 29; 38]
A*sol = [44; 29; 38]
# Задание 14
e1(x) := 4*sqrt(1 - x^2/81)
e2(x) := -4*sqrt(1 - (x^2/81))
c1(x) := 2 + sqrt(25 - (x - 9)^2)
c2(x) := 2 - sqrt(25 - (x - 9)^2)
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x := 4
y := 3.5
Given
x^2/81 + y^2/16 == 1
(x - 9)^2 + (y - 2)^2 == 25
p1 := Find(x, y)
p1 = [4.23934; 3.52845]
x := 7
y := -2.5
Given
x^2/81 + y^2/16 == 1
(x - 9)^2 + (y - 2)^2 == 25
p2 := Find(x, y)
p2 = [6.9308; -2.55175]
# Задание 15
f(x) := x*sin(x)
x := 0, 0.05 .. 10
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x := 2
xm1 := Maximize(f, x)
xm1 = 2.02876
f(xm1) = 1.81971
x := 5
xm2 := Minimize(f, x)
xm2 = 4.91318
f(xm2) = -4.81447
x := 8
xm3 := Maximize(f, x)
xm3 = 7.97867
f(xm3) = 7.91673
